// COMSOL Multiphysics 6.2.0.290 model "1.mph"
// Outline of the model tree

Parameters
  Pi = 1800
  Kb = 1.43e6
  p = 0.69246
  q = 0.37879
  kappa = 0.050994
  a = 0.093377
  sigma = 0.015951
  theta = 0.0020216
  tau = 0.46769
  eta = 0.12227
  phi = 2.896
  mub = 1.95456
  Pib = 0.33954
  rr1 = 3
  Dc = 0.1  // diffusion
  Fb = .00246
  FD = .35
  epsilon = 0.0081708
  H = 127595
  delta = 1.2e-3
  alphaS = 4.1879
  alpha1 = 0
  alphaL = 2.6765
  kappaP = 0.13102
  sigmaP = 0.85113
  kappaL = 0.059152
  sigmaL = 0.15117
  sigmaT = 0.36358
  kappaS = 0.63986
  dM = 0.1
  dSe = 0.08
  dIe = 0.02
  dR = 0.01
  dSa = 0.03
  dIa = 0.06
  dP = 0.02
  Lambdae = 24
  Lambdaa = 56
  mue = 0.0126
  mua = 0.01788
  gammae = 0.131
  sigmaa = 0.012
  deltaM = 209
  muM = 27
  deltap = 78
  mup = 0.12
  beta1 = 6e-5
  beta2 = 1.974e-4
  beta = 0.3
  alpha = 0.05
  Lambda = 0.6
  mu = 0.3
  k = 0.05
  d1 = 0.05
  d2 = 0.04

Functions
  an15: Analytic "int1" | funcname = int1; expr = 1; args = {x, y}; argunit = {, }
  an2: Analytic "longitude to x" | funcname = L2x; expr = (x-87.617733)*111.195; fununit = m; argunit = m
  an3: Analytic "latitude to y" | funcname = L2y; expr = (y-43.792818)*111.195; args = y; fununit = m; argunit = m
  an1: Analytic "乌鲁木齐市" | expr = 1/(2*pi*rr1^2)*exp(-((x)^2+(y)^2)/(2*rr1^2)); args = {x, y}; fununit = 1; argunit = {m, m}
  an11: Analytic "Space-dependent diffusion" | funcname = DD; expr = Dc*(FD+0.25*(1-FD)*(1+tanh(0.1*(x-5))))*(FD+0.25*(1-FD)*(1+tanh(0.1*(y-5)))); args = {x, y}; argunit = {, }
  an12: Analytic "Initial value of infections" | funcname = I0; expr = an1(x,y); args = {x, y}; argunit = {, }
  extm1: MATLAB | funcs = {{u1, x, y}, {u2, x, y}, {u3, x, y}, {u4, x, y}, {u5, x, y}, {w1, x, y}, {w2, x, y}, {w3, x, y}, {w4, x, y}, {w5, x, y}, {w6, x, y}, {w, x, y}, {w7, x, y}}

Geometry
  geom1 "Geometry 1" (2D, length unit m)
    r1: Rectangle "矩形 1" | size = {1, 1}
    fin: Finalize "Form Union"

Physics
  c: CoefficientFormPDE on all domains
    dependent variable u = {x1, x2}
    Units.SourceTermQuantity = dimensionless
    cfeq1: CoefficientFormPDE (default)
      c = 
        {d1-u1(x,y)*w2(x,y), 0, 0, d1-u1(x,y)*w2(x,y)}
        {u1(x,y)*w1(x,y), 0, 0, u1(x,y)*w1(x,y)}
        {0, 0, 0, 0}
        {d2, 0, 0, d2}
      a = {(beta*(1+2*k*w2(x,y))+mu), beta*(1+2*k*w2(x,y))*w1(x,y), -beta*(1+2*k*w2(x,y)), -beta*(1+2*k*w2(x,y))*w1(x,y)+(alpha+mu)}
      f = {0, 1}
      da = {-1, 0, 0, -1}
    zflx1: ZeroFluxBoundary "Zero Flux 1" (default)
    init1: init "Initial Values 1" (default)
      // Integration of function an1(x,y) gives 0.89424
      x1 = 0
      x1t = 0
      x2 = 0
      x2t = 0
      x3 = -modelInitR(x, y)
      x4 = -modelInitM(x, y)
      x5 = -modelInitSa(x, y)
      x3t = -modelInitdR(x, y)
      x4t = -modelInitdM(x, y)
      x5t = -modelInitdSa(x, y)
      x6 = modelInitIa(x, y)
      x6t = modelInitdIa(x, y)
      x7 = modelInitP(x, y)
      x7t = modelInitdP(x, y)
      q6 = 0
      q6t = 0
      q7 = 0
      q7t = 0
      q1 = 0
      q1t = 0
      q2 = 0
      q2t = 0
      q3 = 0
      q3t = 0
      q4 = 0
      q4t = 0
      q5 = 0
      q5t = 0

Mesh
  mesh1 "Mesh 1" (physics-controlled)
    size: MeshSizeDefault | hauto = 2

Studies
  std1 "Study 1"
    time: Transient "Time Dependent" | tlist = 1

Solver configurations
  sol2 "Solution 2" (study std1)
    v1: Variables "Dependent Variables 1"
    t1: Time "Time-Dependent Solver 1" | tlist = 1
      dDef: Direct | thresh = 0.1
      fc1: FullyCoupled

Datasets
  dset2: Solution | solution = sol2
  an11_ds1: Grid1D "一维栅格 1" | function = an11; data = none; res1 = 10000; distribution = mixed
  an11_ds2: Grid2D "二维栅格 2" | source = data; data = dset2

Derived values
  int1: IntSurface "Surface Integration 1"
    data = dset2
    table = tbl1
    expr = {S, E, H, I, R, D, A, AR, I+D+H+R}
    unit = {, , m^2, , , , , , }

Tables
  tbl1: Table
    // Surface Integration 1
    Time (s) | S (m^2) | E (m^2) | H (m^2) | I (m^2) | R (m^2) | D (m^2) | A (m^2) | AR (m^2) | I+D+H+R (m^2)
    0 | 9.27307e+06 | 268.29 | 0.00210703 | 99.0124 | 0.00270809 | 0.999957 | 283.806 | 0.0123054 | 100.017
    1 | 9.27292e+06 | 198.749 | 8.17552 | 138.632 | 12.0542 | 1.11725 | 316.653 | 44.4796 | 159.979
    2 | 9.27277e+06 | 166.034 | 16.986 | 159.235 | 28.2821 | 1.48913 | 328.454 | 92.0078 | 205.992
    3 | 9.27261e+06 | 151.185 | 25.4946 | 172.364 | 47.0542 | 2.08331 | 332.947 | 140.384 | 246.997
    4 | 9.27245e+06 | 148.23 | 33.3669 | 182.221 | 68.3681 | 2.93221 | 335.492 | 189.277 | 286.889
    5 | 9.27227e+06 | 150.398 | 40.8472 | 191.382 | 91.1731 | 3.93237 | 338.382 | 238.536 | 327.334
    6 | 9.27209e+06 | 157.583 | 47.8475 | 201.006 | 116.269 | 5.15302 | 343.523 | 288.763 | 370.276
    7 | 9.2719e+06 | 167.066 | 54.6393 | 211.612 | 143.134 | 6.52807 | 350.962 | 340.17 | 415.914
    8 | 9.27169e+06 | 178.774 | 61.3706 | 223.802 | 172.552 | 8.10261 | 361.569 | 393.92 | 465.828
    9 | 9.27146e+06 | 193.551 | 68.2143 | 239.05 | 206.66 | 10.0217 | 377.855 | 452.571 | 523.946
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
Plots
  pg1: PlotGroup2D "2D Plot Group 1"
    data = dset2
    title = Confirmed cases: eval(t) years after start
    xlabel = x
    ylabel = y
    surf1: Surface | expr = x4
    surf2: Surface "表面 2" (disabled) | expr = log10(I0(x,y))
  pg2: PlotGroup1D "一维绘图组 2" | data = an11_ds1; title = DD(x)
    plot1: Function "函数 1" | expr = comp1.DD(x); descr = DD(x); xdataexpr = x
  pg3: PlotGroup2D "二维绘图组 3" | data = an11_ds2; title = D(x,y)
    plot1: Function2D "函数 1" | expr = comp1.D(x,y); descr = D(x,y)
      height1: Height "高度表达式 1" | expr = S
  pg4: PlotGroup3D "三维绘图组 4"
    surf1: Surface "表面 1" | data = dset2; expr = x2

Exports
  anim1: Animation | giffilename = /Users/jinchuanshi/Desktop/杂七杂八/吴鹏/Untitled.gif; framesel = all
  anim2: Animation "动画 2" | type = imageseq; maxframes = 41; size = hd; frametime = 1
  img1: Image "图像 1"
    size = manualweb
    unit = px
    width = 1280
    height = 720
    sizedesc = 339 x 191 mm
    pngfilename = C:\Users\pengwununu\Desktop\Untitled.png
    addsuffix = off